# OpenSim document version 40000
ScaleTool Model_OS-scaled:
  mass: 78.09885 [kg]
  height: -1
  age: -1
  GenericModelMaker:
    model_file: C:\Users\tom_v\My Drive\PostDoc\predsim_nn\OpenSimModel\Hamner_modified\Model\Hamner_modified.osim
  ModelScaler:
    apply: true
    scaling_order: manualScale
    time_range: -1 -1
    preserve_mass_distribution: false
    ScaleSet:
      Scale: scales=(1 1 1) segment=pelvis apply=true
      Scale: scales=(1 1 1) segment=femur_r apply=true
      Scale: scales=(1 1 1) segment=tibia_r apply=true
      Scale: scales=(1 1 1) segment=talus_r apply=true
      Scale: scales=(1 1 1) segment=calcn_r apply=true
      Scale: scales=(1 1 1) segment=toes_r apply=true
      Scale: scales=(1 1 1) segment=femur_l apply=true
      Scale: scales=(1 1 1) segment=tibia_l apply=true
      Scale: scales=(1 1 1) segment=talus_l apply=true
      Scale: scales=(1 1 1) segment=calcn_l apply=true
      Scale: scales=(1 1 1) segment=toes_l apply=true
      Scale: scales=(1 1 1) segment=torso apply=true
      Scale: scales=(1 1 1) segment=humerus_r apply=true
      Scale: scales=(1 1 1) segment=radius_r apply=true
      Scale: scales=(1 1 1) segment=ulna_r apply=true
      Scale: scales=(1 1 1) segment=hand_r apply=true
      Scale: scales=(1 1 1) segment=humerus_l apply=true
      Scale: scales=(1 1 1) segment=radius_l apply=true
      Scale: scales=(1 1 1) segment=ulna_l apply=true
      Scale: scales=(1 1 1) segment=hand_l apply=true
  MarkerPlacer:
    apply: false
    time_range: -1 -1
    max_marker_movement: -1
    IKTaskSet:
      IKMarkerTask R_ASIS: apply=true weight=1
      IKMarkerTask L_ASIS: apply=true weight=1
      IKMarkerTask L_PSIS: apply=true weight=1
      IKMarkerTask R_Thigh_Upper: apply=true weight=1
      IKMarkerTask R_Thigh_Front: apply=true weight=1
      IKMarkerTask R_Thigh_Rear: apply=true weight=1
      IKMarkerTask R_Knee_Lat: apply=true weight=1
      IKMarkerTask R_Shank_Upper: apply=true weight=1
      IKMarkerTask R_Shank_Front: apply=true weight=1
      IKMarkerTask R_Shank_Rear: apply=true weight=1
      IKMarkerTask R_Ankle_Lat: apply=true weight=1
      IKMarkerTask R_Heel: apply=true weight=1
      IKMarkerTask R_Toe_Lat: apply=true weight=1
      IKMarkerTask R_Toe_Med: apply=true weight=1
      IKMarkerTask R_Toe_Tip: apply=true weight=1
      IKMarkerTask L_Thigh_Upper: apply=true weight=1
      IKMarkerTask L_Thigh_Front: apply=true weight=1
      IKMarkerTask L_Thigh_Rear: apply=true weight=1
      IKMarkerTask L_Knee_Lat: apply=true weight=1
      IKMarkerTask L_Shank_Upper: apply=true weight=1
      IKMarkerTask L_Shank_Front: apply=true weight=1
      IKMarkerTask L_Shank_Rear: apply=true weight=1
      IKMarkerTask L_Ankle_Lat: apply=true weight=1
      IKMarkerTask L_Heel: apply=true weight=1
      IKMarkerTask L_Toe_Lat: apply=true weight=1
      IKMarkerTask L_Toe_Med: apply=true weight=1
      IKMarkerTask L_Toe_Tip: apply=true weight=1
      IKMarkerTask R_PSIS: apply=true weight=1
